! Universidade Federal de Santa Maria (UFSM)
! Centro de Tecnologia (CT)
! Programa de Pós-graduação em Engenharia Civil e Ambiental (PPGECAM)
! ECC840 - Análise Estrutural I
! Docente: Dr. João Kaminski Junior
!
! Trabalho 1: Modelos Estruturais para pavimentos
! MODELO 01 - BEAM4 - COM VIGAS DE CONTORNO - CALLIBRAÇÃO POR DESLOCAMENTO
!
! Alencar Maders Schuster
! Kelvin Rafael Duarte Machado
! Pedro Guilherme do Nascimento
! Pedro Henrique Vieira de Almeida
!
! Santa Maria, 17 de julho de 2025
! -----------------------------------------------------------------------------------------
/CLEAR

/FILNAME, grelha_M2_2_D

! ------------PRÉ PROCESSAMENTO------------
/PREP7

! ELEMENTO
ET,1,BEAM4

! SEÇÃO 1 - elementos da grelha
R, 1, 390, 5492.5, 29250, 13, 30, 0,
RMORE, 0, 13420

! SEÇÃO 2 - viga 30x60
R, 2, 1800, 1534050.0, 135000, 60, 30, 0,
RMORE, 0, 55617.9

! SEÇÃO 3 - viga 30x45
R, 3, 1350, 573412.5, 101250, 45, 30, 0,
RMORE, 0, 35655

! MATERIAL
MP, EX, 1, 2380
MP, GXY, 991.7

! NÓS
N,	1,	0,	0,	300
N,	2,	30,	0,	300
N,	3,	60,	0,	300
N,	4,	90,	0,	300
N,	5,	120,	0,	300
N,	6,	150,	0,	300
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N,	231,	600,	0,	0

! ELEMENTOS
! VIGA DE 30X60
TYPE, 1
MAT, 1
REAL, 2

EN,	1,	1,	2
EN,	2,	2,	3
EN,	3,	3,	4
EN,	4,	4,	5
EN,	5,	5,	6
EN,	6,	6,	7
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EN,	220,	230,	231


! VIGA DE 30X45
TYPE, 1
MAT, 1
REAL, 3
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EN,	430,	210,	231

! ELEMENTOS DA GRELHA
TYPE, 1
MAT, 1
REAL, 1
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EN,	420,	209,	230

FINISH

! ------------SOLUÇÃO------------
/SOLU

! Restrições nas extremidades (pilares)
D, 1, UX
D, 1, UY
D, 1, UZ

D, 21, UX
D, 21, UY
D, 21, UZ

D, 211,	UX
D, 211, UY
D, 211, UZ

D, 231, UX
D, 231, UY
D, 231, UZ

! Forças aplicadas nos nós
F,	1,	FY,	-0.873
F,	2,	FY,	-0.873
F,	3,	FY,	-0.873
F,	4,	FY,	-0.873
F,	5,	FY,	-0.873
F,	6,	FY,	-0.873
F,	7,	FY,	-0.873
F,	8,	FY,	-0.873
F,	9,	FY,	-0.873
F,	10,	FY,	-0.873
F,	11,	FY,	-0.873
F,	12,	FY,	-0.873
F,	13,	FY,	-0.873
F,	14,	FY,	-0.873
F,	15,	FY,	-0.873
F,	16,	FY,	-0.873
F,	17,	FY,	-0.873
F,	18,	FY,	-0.873
F,	19,	FY,	-0.873
F,	20,	FY,	-0.873
F,	21,	FY,	-0.873
F,	22,	FY,	-0.873
F,	23,	FY,	-0.873
F,	24,	FY,	-0.873
F,	25,	FY,	-0.873
F,	26,	FY,	-0.873
F,	27,	FY,	-0.873
F,	28,	FY,	-0.873
F,	29,	FY,	-0.873
F,	30,	FY,	-0.873
F,	31,	FY,	-0.873
F,	32,	FY,	-0.873
F,	33,	FY,	-0.873
F,	34,	FY,	-0.873
F,	35,	FY,	-0.873
F,	36,	FY,	-0.873
F,	37,	FY,	-0.873
F,	38,	FY,	-0.873
F,	39,	FY,	-0.873
F,	40,	FY,	-0.873
F,	41,	FY,	-0.873
F,	42,	FY,	-0.873
F,	43,	FY,	-0.873
F,	44,	FY,	-0.873
F,	45,	FY,	-0.873
F,	46,	FY,	-0.873
F,	47,	FY,	-0.873
F,	48,	FY,	-0.873
F,	49,	FY,	-0.873
F,	50,	FY,	-0.873
F,	51,	FY,	-0.873
F,	52,	FY,	-0.873
F,	53,	FY,	-0.873
F,	54,	FY,	-0.873
F,	55,	FY,	-0.873
F,	56,	FY,	-0.873
F,	57,	FY,	-0.873
F,	58,	FY,	-0.873
F,	59,	FY,	-0.873
F,	60,	FY,	-0.873
F,	61,	FY,	-0.873
F,	62,	FY,	-0.873
F,	63,	FY,	-0.873
F,	64,	FY,	-0.873
F,	65,	FY,	-0.873
F,	66,	FY,	-0.873
F,	67,	FY,	-0.873
F,	68,	FY,	-0.873
F,	69,	FY,	-0.873
F,	70,	FY,	-0.873
F,	71,	FY,	-0.873
F,	72,	FY,	-0.873
F,	73,	FY,	-0.873
F,	74,	FY,	-0.873
F,	75,	FY,	-0.873
F,	76,	FY,	-0.873
F,	77,	FY,	-0.873
F,	78,	FY,	-0.873
F,	79,	FY,	-0.873
F,	80,	FY,	-0.873
F,	81,	FY,	-0.873
F,	82,	FY,	-0.873
F,	83,	FY,	-0.873
F,	84,	FY,	-0.873
F,	85,	FY,	-0.873
F,	86,	FY,	-0.873
F,	87,	FY,	-0.873
F,	88,	FY,	-0.873
F,	89,	FY,	-0.873
F,	90,	FY,	-0.873
F,	91,	FY,	-0.873
F,	92,	FY,	-0.873
F,	93,	FY,	-0.873
F,	94,	FY,	-0.873
F,	95,	FY,	-0.873
F,	96,	FY,	-0.873
F,	97,	FY,	-0.873
F,	98,	FY,	-0.873
F,	99,	FY,	-0.873
F,	100,	FY,	-0.873
F,	101,	FY,	-0.873
F,	102,	FY,	-0.873
F,	103,	FY,	-0.873
F,	104,	FY,	-0.873
F,	105,	FY,	-0.873
F,	106,	FY,	-0.873
F,	107,	FY,	-0.873
F,	108,	FY,	-0.873
F,	109,	FY,	-0.873
F,	110,	FY,	-0.873
F,	111,	FY,	-0.873
F,	112,	FY,	-0.873
F,	113,	FY,	-0.873
F,	114,	FY,	-0.873
F,	115,	FY,	-0.873
F,	116,	FY,	-0.873
F,	117,	FY,	-0.873
F,	118,	FY,	-0.873
F,	119,	FY,	-0.873
F,	120,	FY,	-0.873
F,	121,	FY,	-0.873
F,	122,	FY,	-0.873
F,	123,	FY,	-0.873
F,	124,	FY,	-0.873
F,	125,	FY,	-0.873
F,	126,	FY,	-0.873
F,	127,	FY,	-0.873
F,	128,	FY,	-0.873
F,	129,	FY,	-0.873
F,	130,	FY,	-0.873
F,	131,	FY,	-0.873
F,	132,	FY,	-0.873
F,	133,	FY,	-0.873
F,	134,	FY,	-0.873
F,	135,	FY,	-0.873
F,	136,	FY,	-0.873
F,	137,	FY,	-0.873
F,	138,	FY,	-0.873
F,	139,	FY,	-0.873
F,	140,	FY,	-0.873
F,	141,	FY,	-0.873
F,	142,	FY,	-0.873
F,	143,	FY,	-0.873
F,	144,	FY,	-0.873
F,	145,	FY,	-0.873
F,	146,	FY,	-0.873
F,	147,	FY,	-0.873
F,	148,	FY,	-0.873
F,	149,	FY,	-0.873
F,	150,	FY,	-0.873
F,	151,	FY,	-0.873
F,	152,	FY,	-0.873
F,	153,	FY,	-0.873
F,	154,	FY,	-0.873
F,	155,	FY,	-0.873
F,	156,	FY,	-0.873
F,	157,	FY,	-0.873
F,	158,	FY,	-0.873
F,	159,	FY,	-0.873
F,	160,	FY,	-0.873
F,	161,	FY,	-0.873
F,	162,	FY,	-0.873
F,	163,	FY,	-0.873
F,	164,	FY,	-0.873
F,	165,	FY,	-0.873
F,	166,	FY,	-0.873
F,	167,	FY,	-0.873
F,	168,	FY,	-0.873
F,	169,	FY,	-0.873
F,	170,	FY,	-0.873
F,	171,	FY,	-0.873
F,	172,	FY,	-0.873
F,	173,	FY,	-0.873
F,	174,	FY,	-0.873
F,	175,	FY,	-0.873
F,	176,	FY,	-0.873
F,	177,	FY,	-0.873
F,	178,	FY,	-0.873
F,	179,	FY,	-0.873
F,	180,	FY,	-0.873
F,	181,	FY,	-0.873
F,	182,	FY,	-0.873
F,	183,	FY,	-0.873
F,	184,	FY,	-0.873
F,	185,	FY,	-0.873
F,	186,	FY,	-0.873
F,	187,	FY,	-0.873
F,	188,	FY,	-0.873
F,	189,	FY,	-0.873
F,	190,	FY,	-0.873
F,	191,	FY,	-0.873
F,	192,	FY,	-0.873
F,	193,	FY,	-0.873
F,	194,	FY,	-0.873
F,	195,	FY,	-0.873
F,	196,	FY,	-0.873
F,	197,	FY,	-0.873
F,	198,	FY,	-0.873
F,	199,	FY,	-0.873
F,	200,	FY,	-0.873
F,	201,	FY,	-0.873
F,	202,	FY,	-0.873
F,	203,	FY,	-0.873
F,	204,	FY,	-0.873
F,	205,	FY,	-0.873
F,	206,	FY,	-0.873
F,	207,	FY,	-0.873
F,	208,	FY,	-0.873
F,	209,	FY,	-0.873
F,	210,	FY,	-0.873
F,	211,	FY,	-0.873
F,	212,	FY,	-0.873
F,	213,	FY,	-0.873
F,	214,	FY,	-0.873
F,	215,	FY,	-0.873
F,	216,	FY,	-0.873
F,	217,	FY,	-0.873
F,	218,	FY,	-0.873
F,	219,	FY,	-0.873
F,	220,	FY,	-0.873
F,	221,	FY,	-0.873
F,	222,	FY,	-0.873
F,	223,	FY,	-0.873
F,	224,	FY,	-0.873
F,	225,	FY,	-0.873
F,	226,	FY,	-0.873
F,	227,	FY,	-0.873
F,	228,	FY,	-0.873
F,	229,	FY,	-0.873
F,	230,	FY,	-0.873
F,	231,	FY,	-0.873

SOLVE

! ------------PÓS PROCESSAMENTO------------
/POST1

SET, LAST

/VIEW, 1, 1, 1, 1
/ANG, 1
PLDISP, 1
/REPLOT

! Criação das tabelas para momentos e forças nos elementos de grelha
ETABLE, MFORXI, SMISC, 1
ETABLE, MFORYI, SMISC, 2
ETABLE, MFORZI, SMISC, 3
ETABLE, MMOMXI, SMISC, 4
ETABLE, MMOMYI, SMISC, 5
ETABLE, MMOMZI, SMISC, 6
ETABLE, MFORXJ, SMISC, 7
ETABLE, MFORYJ, SMISC, 8
ETABLE, MFORZJ, SMISC, 9
ETABLE, MMOMXJ, SMISC, 10
ETABLE, MMOMYJ, SMISC, 11
ETABLE, MMOMZJ, SMISC, 12

! Listagem tabular dos momentos
PRETAB, MFORXI, MFORXJ
PRETAB, MFORYI, MFORYJ
PRETAB, MFORZI, MFORZJ
PRETAB, MMOMXI, MMOMXJ
PRETAB, MMOMYI, MMOMYJ
PRETAB, MMOMZI, MMOMZJ

! Seleção e listagem de deslocamentos
NSEL, S, NODE, , 1, 260
PRNSOL, U, Y

! Reações de apoio
PRRSOL, F
PRRSOL, M

FINISH
